atom_style         meso-molecular
dimension          3
newton             on
units              micro
read_data          evapsolv.data

variable           h        	 equal 2.0
variable           h_act    	 equal 3.0
variable 		   h_mix	     equal (${h}+${h_act})/2.0
variable           c     	     equal 100.0             # soundspeed for Tait's EOS
variable           dt            equal 0.0001
variable		   visc_CBD      equal 2357.8			 # viscosity in g/m*s (avg visc should be 2.3578 kg/m*s)
variable 		   visc_active   equal 2357.8
variable 		   visc_solvent  equal 2357.8


variable		   visc_mix1     equal (${visc_CBD}+${visc_active})/2.0
variable 		   visc_mix2     equal (${visc_active}+${visc_solvent})/2.0
variable 		   visc_mix3     equal (${visc_CBD}+${visc_solvent})/2.0

group              cbd type 1
group			   active type 2
group			   solvent type 3
group              slurry type 1 2 3
#group              bc type 4

#print              hello

pair_style         hybrid/overlay sph/rhosum 1 sph/taitwater/morris
pair_coeff         * * sph/taitwater/morris 0.93 ${c} ${visc_CBD} ${h}
#pair_coeff         1 1 sph/taitwater/morris 0.93 ${c} ${visc_CBD} ${h}
#pair_coeff         2 2 sph/taitwater/morris 0.93 ${c} ${visc_active} ${h}
#pair_coeff         3 3 sph/taitwater/morris 0.93 ${c} ${visc_solvent} ${h}

#pair_coeff         1 2 sph/taitwater/morris 0.93 ${c} ${visc_mix1} ${h_mix}
#pair_coeff         2 3 sph/taitwater/morris 0.93 ${c} ${visc_mix2} ${h_mix}
#pair_coeff         1 3 sph/taitwater/morris 0.93 ${c} ${visc_mix3} ${h_mix}

pair_coeff         * * sph/rhosum ${h}
#pair_coeff         2 * sph/rhosum ${h_act}
#pair_coeff         2 2 sph/rhosum ${h_act}
#print				I

timestep    ${dt}


# time-integrate position, velocities, internal energy and density of cbd particles
fix                integrate_slurry_fix slurry meso
# time-integrate only internal energy and density of boundary particles
#fix                integrate_bc_fix bc meso/stationary

dump               dump_id all custom 10000 J_modified_run_whole_end_evap.lammpstrj id mol type xs ys zs
dump_modify        dump_id first yes
dump_modify 	   dump_id sort 3

#compute thermo_temp slurry temp
#thermo_modify temp slurry
uncompute thermo_temp
compute thermo_temp slurry temp
thermo             1000
thermo_style       custom step time temp press density lx ly lz
thermo_modify      norm no

neigh_modify       every 5 delay 0 check no
variable           skin equal 0.3*${h}
neighbor           ${skin} bin # set Verlet list skin distance

#print              am
fix make_rigid active rigid molecule   # make active come together
#fix make_rigid1 bc rigid molecule

variable g equal 9.8/1000000
fix add_gravity slurry gravity ${g} vector 0 0 -1  # Acceleration is micrometers/(microseconds)^2
group		cbd_solvent type 1 3

#variable wiggle_s equal swiggle(0,2000,10)
#print             your
#variable wiggle_c equal cwiggle(0,-2000,10)

#fix strong_gravity slurry addforce 0.0 0.0 -0.05
#group stir_bar molecule 2
#fix stir_the_bar stir_bar addforce v_wiggle_s 0.0 v_wiggle_c
#fix stir cbd addforce v_wiggle_s 0.0 v_wiggle_c
fix heat_cbd_solvent cbd_solvent nvt temp 30000 300 30

fix heat_active active nvt temp 30000 300 30
#fix stir slurry nvt temp 10000000000 10000000000 10
#group moving_surface molecule 1 # when we want the wall to move bottom wall instead of the hopper
#fix move_surface moving_surface move linear 0.09 0 0 # Speed is in m/s (coating speeds vary from 1/60 m/s to 10/60 m/s)

#group bottom_wall type 6
#group piston_wall type 5

#variable piston_speed equal -0.04
#variable surface_speed equal abs(${piston_speed}*3)

# Stir
run 10000 #number of timesteps
#unfix stir
#unfix stir_the_bar

# Cool
#fix cool slurry langevin 300 300 10 234
#run 10000
#unfix cool

# Apply extra gravity
fix extra_gravity slurry addforce 0.0 0.0 -8.0
#run 10000
#fall down little more

unfix extra_gravity

# Move piston wall to starting position
#variable dz equal bound(slurry,zmax)-bound(piston_wall,zmin)+0.2
#displace_atoms piston_wall move 0 0 ${dz}


# Expansion step
#run 10000

# Cooling step
variable tdamp equal 100*${dt}
variable tdamp2 equal 10000*${tdamp}

fix cool cbd_solvent nvt temp 300 300 ${tdamp2}    #damp temperature is how fast it tries to correct the temp
#run 10000
unfix make_rigid
fix make_rigid active rigid/nvt molecule temp 300 300 ${tdamp2}
#variable  dt1 equal 0.000001
#timestep ${dt1}
run 50000

variable  dt2 equal 0.0009
timestep ${dt2}
#unfix cool

# Start moving piston wall and hopper
dump_modify        dump_id every 25000
#fix push_piston piston_wall move linear 0.0 0.0 ${piston_speed}
#fix push_piston piston_wall move linear ${surface_speed} 0.0 ${piston_speed}
#variable z_max equal bound(piston_wall,zmax)
#variable z_min equal bound(bottom_wall,zmin)
#variable run_length equal abs(floor((${z_max}-${z_min}-3)/(${piston_speed}*${dt})))
#delete_atoms group bottom_wall
#group walls type 3
#group hopper subtract walls moving_surface
#fix move_hopper hopper move linear ${surface_speed} 0.0 0.0
#print ${run_length}
#unfix push_piston

#delete_atoms group piston_wall

#delete_atoms group	hopper

write_data finished_coat.data

region		whole block	INF INF INF INF INF INF

#fix evap1 solvent evaporate 10000 1 whole  1234


region top block 0 EDGE 0 EDGE 28 70
region middle block 0 EDGE 0 EDGE 14 28
region bottom block 0 EDGE 0 EDGE 1 14

fix evap solvent evaporate 10000 1 top 1234
fix evap solvent evaporate 50000 1 middle 1234
fix evap solvent evaporate 100000 1 bottom 1234

#fix evap2 active evaporate 1000 1 whole  1234
# Run with piston stopped
#run ${run_length}
#run ${run_length}

run 100000000

region		whole block	INF INF INF INF INF INF

fix evap1 solvent evaporate 10000 1 whole  1234

run 1000000
