atom_style         meso-molecular
dimension          3
newton             on
units              micro
read_data          longbox.data

variable           h equal 2.0
variable		   h_act equal 3.0
variable		   h_mix equal (${h}+${h_act})/2
variable           c     equal 100.0 # soundspeed for Tait's EOS
variable           dt    equal 0.0001
variable		   visc  equal 2357.8

group              cbd type 1
group			   active type 2
group			   solvent type 3
group  			   cbd_solvent type 1 3
group      		   cbd_active type 1 2

group              slurry type 1 2 3
group              bc type 4

pair_style         hybrid/overlay sph/rhosum 1 sph/taitwater/morris
pair_coeff         * * sph/taitwater/morris 0.93 ${c} ${visc} ${h}
pair_coeff         * * sph/rhosum ${h}


timestep 	      	${dt}

fix make_rigid active rigid molecule

# time-integrate position, velocities, internal energy and density of cbd particles
fix                integrate_slurry_fix slurry meso
# time-integrate only internal energy and density of boundary particles
fix                integrate_bc_fix bc meso/stationary


# dump files
dump               dump_id all custom 10000 SC-npt_shrink7.lammpstrj id type mol xs ys zs
dump_modify        dump_id first yes

dump_modify 	   dump_id sort 3
thermo             10000
thermo_style       custom step time temp press density lx ly lz

thermo_modify      norm no

neigh_modify       every 5 delay 0 check no
variable           skin equal 0.3*${h}
neighbor           ${skin} bin # set Verlet list skin distance

fix stir slurry langevin 10000000000 10000000000 100 234


run 100000


#fix npt_method all npt temp $T $T 100.0 iso 100.0 100.0 1000.0 tloop 20

# reset_timestep 		0
# write_restart restart_tutorial


fix npt_method1 all npt temp 500 500 100.0 iso 100.0 100.0 1000.0 tloop 20

run 500000
unfix npt_method1
fix cool1  all  temp 400 400 30
run 500000
unfix cool1

fix npt_method2 all npt temp 400 400 100.0 iso 100.0 100.0 1000.0 tloop 20

run 500000
unfix npt_method2
fix cool2  all  temp 300 300 30
run 500000
unfix cool2

fix npt_method3 all npt temp 300 300 100.0 iso 100.0 100.0 1000.0 tloop 20

run 500000
unfix npt_method3
fix cool3 all  temp 200 200 30
run 500000
unfix cool3

#fix npt_method4 all npt temp 200 200 100.0 iso 100.0 100.0 1000.0 tloop 20

#run 500000
#unfix npt_method4
#fix cool4 active all  temp 100 100 30
#run 50000
#unfix cool4

#fix npt_method5 all npt temp 100 100 100.0 iso 100.0 100.0 1000.0 tloop 20

#run 500000


write_data finished_npt_shrink7.data
